*Heading
** Job name: Job-mixedmesh Model name: Model-1
** Generated by: Abaqus/CAE 6.14-5
*Preprint, echo=NO, model=NO, history=NO, contact=NO
**
** PARTS
**
*Part, name=Part-1
*Node
      1,          10.,          -5.,           0.
      2,          10.,           5.,           0.
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*Element, type=C3D15
 1,   1,  19,   4,  41, 155,  23, 229, 228, 227, 230, 231, 232, 234, 233, 235
 2,  19,  20,  21, 155, 156, 137, 238, 237, 236, 239, 240, 241, 233, 242, 243
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*Element, type=C3D10
121, 120, 116, 123, 221, 675, 674, 673, 677, 676, 678
122, 121, 120, 116, 123, 680, 675, 679, 681, 673, 674
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*End Part
**
**
** ASSEMBLY
**
*Assembly, name=Assembly
**
*Instance, name=Part-1-1, part=Part-1
*End Instance
**
*Nset, nset=Set-1, instance=Part-1-1
   9,  10,  11,  12,  63,  64
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*Elset, elset=Set-1, instance=Part-1-1, generate
 61,  66,   1
*Nset, nset=Set-2, instance=Part-1-1
   5,   6,   7,   8,  59,  60
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*Elset, elset=Set-2, instance=Part-1-1, generate
 55,  60,   1
*Nset, nset=Set-3, instance=Part-1-1
  17,  18, 123, 124, 125, 126
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*Elset, elset=Set-3, instance=Part-1-1
 152, 173, 175, 187, 191, 198, 214, 216, 235, 245, 247, 249, 250, 251, 257, 262
*End Assembly
**
** BOUNDARY CONDITIONS
**
** Name: BC-1 Type: Symmetry/Antisymmetry/Encastre
*Boundary
Set-1, ENCASTRE
** Name: BC-2 Type: Symmetry/Antisymmetry/Encastre
*Boundary
Set-2, ENCASTRE
** Name: BC-3 Type: Symmetry/Antisymmetry/Encastre
*Boundary
Set-3, ENCASTRE
** ----------------------------------------------------------------
**
** STEP: Step-1
**
*Step, name=Step-1, nlgeom=NO
*Static
1., 1., 1e-05, 1.
**
** OUTPUT REQUESTS
**
*Restart, write, frequency=0
**
** FIELD OUTPUT: F-Output-1
**
*Output, field, variable=PRESELECT
**
** HISTORY OUTPUT: H-Output-1
**
*Output, history, variable=PRESELECT
*End Step
